// SBML level 3 version 1

model IPTG_membrane()
  // model units - substance: count, time: second, extent: mole

  // Compartments:
  compartment cell_internal = 1 litre;
  compartment cell_external = 1 litre;

  // Species:
  species IPTG_2_combined in cell_internal = 0;
  species xxprotein_alHL in cell_internal = 0; xxprotein_alHL is "protein alHL*";
  species xxIPTG_protein_alHL in cell_internal = 0; xxIPTG_protein_alHL is "IPTG:protein alHL*";

  // Parameters:
  k1f = 1 per_second;
  k1r = 1 per_second;
  k2f = 1 per_second;

  // Reactions:
  r1: IPTG_2_combined + xxprotein_alHL -> xxIPTG_protein_alHL; k1f*IPTG_2_combined*xxprotein_alHL - k1r*xxIPTG_protein_alHL;
  r2: xxIPTG_protein_alHL => IPTG_2_combined + xxprotein_alHL; k2f*xxIPTG_protein_alHL;

  // Unit definitions:
  unit per_second = 1 / second;
  unit count = dimensionless;
end
